*Heading
** Job name: PP_coarse_compress Model name: Pmesh_ordered
** Generated by: Abaqus/CAE 2020
*Preprint, echo=NO, model=NO, history=NO, contact=NO
**
** PARTS
**
*Part, name=PART-1
*Node
      1,           0.,           0.
      2,  0.277999997,           0.
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*Element, type=CPS3
   1,  19,   1,  25
   2,   1,   4,  25
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*Elset, elset=Set-1, generate
    1,  1313,     1
*Orientation, name=Ori-1
1., 0., 0., 0., 1., 0.
3, 0.
** Section: Section-1
*Solid Section, elset=Set-1, orientation=Ori-1, material=UANISOHYPER-MAT
,
*End Part
**
**
** ASSEMBLY
**
*Assembly, name=Assembly
**
*Instance, name=PART-1-1, part=PART-1
*End Instance
**
*Nset, nset=Set-1, instance=PART-1-1, generate
  1,  15,   1
*Nset, nset=Set-2, instance=PART-1-1
 135, 144, 152, 161, 169, 179
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*Nset, nset=Set-3, instance=PART-1-1
 144, 161, 179, 194, 208, 223
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*Nset, nset=Set-4, instance=PART-1-1
 1,
*Nset, nset=Set-5, instance=PART-1-1, generate
  1,  15,   1
*End Assembly
**
** MATERIALS
**
*Material, name=UANISOHYPER-MAT
*Anisotropic Hyperelastic, user, formulation=INVARIANT, type=INCOMPRESSIBLE, local direction=2, properties=1, moduli=INSTANTANEOUS
999.,
**
** BOUNDARY CONDITIONS
**
** Name: BC-1 Type: Symmetry/Antisymmetry/Encastre
*Boundary
Set-4, ENCASTRE
** ----------------------------------------------------------------
**
** STEP: Step-1
**
*Step, name=Step-1, nlgeom=YES
*Static
1., 1., 1e-05, 1.
**
** BOUNDARY CONDITIONS
**
** Name: BC-2 Type: Symmetry/Antisymmetry/Encastre
*Boundary
Set-5, YSYMM
** Name: BC-3 Type: Displacement/Rotation
*Boundary
Set-3, 2, 2, -0.2
**
** OUTPUT REQUESTS
**
*Restart, write, frequency=0
**
** FIELD OUTPUT: F-Output-1
**
*Output, field, variable=PRESELECT
**
** HISTORY OUTPUT: H-Output-1
**
*Output, history, variable=PRESELECT
*End Step
