*Heading
** Job name: PP_fine_filleted Model name: PP_fine_filleted
** Generated by: Abaqus/CAE 2020
*Preprint, echo=NO, model=NO, history=NO, contact=NO
**
** PARTS
**
*Part, name=PART-1
*Node
      1,      1.96234,  0.842419982
      2,   1.95904005,  0.866783023
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*Element, type=CPS3
   1,    1,    3,    4
   2,    2,    5,    1
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*Elset, elset=Set-1, generate
    1,  2968,     1
*Orientation, name=Ori-1
1., 0., 0., 0., 1., 0.
3, 0.
** Section: Section-1
*Solid Section, elset=Set-1, orientation=Ori-1, material=UANISOHYPER-MAT
,
*End Part
**
**
** ASSEMBLY
**
*Assembly, name=Assembly
**
*Instance, name=PART-1-1, part=PART-1
*End Instance
**
*Nset, nset=BottomLeftCorner, instance=PART-1-1
 1493,
*Nset, nset=BottomSurface, instance=PART-1-1
 1356, 1377, 1394, 1410, 1425, 1442, 1460, 1477, 1491, 1492, 1493, 1507, 1508, 1509, 1510
*Nset, nset=TopSurface, instance=PART-1-1
 126, 166, 199, 228, 256, 296
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*End Assembly
**
** MATERIALS
**
*Material, name=UANISOHYPER-MAT
*Anisotropic Hyperelastic, user, formulation=INVARIANT, type=INCOMPRESSIBLE, local direction=2, properties=1, moduli=INSTANTANEOUS
999.,
**
** BOUNDARY CONDITIONS
**
** Name: BottomLeftCornerEncastre Type: Symmetry/Antisymmetry/Encastre
*Boundary
BottomLeftCorner, ENCASTRE
** Name: BottomSurfaceYsymm Type: Symmetry/Antisymmetry/Encastre
*Boundary
BottomSurface, YSYMM
** ----------------------------------------------------------------
**
** STEP: Step-1
**
*Step, name=Step-1, nlgeom=YES
*Static
1., 1., 1e-05, 1.
**
** BOUNDARY CONDITIONS
**
** Name: TopSurfaceCompress Type: Displacement/Rotation
*Boundary
TopSurface, 2, 2, 0.05
**
** OUTPUT REQUESTS
**
*Restart, write, frequency=0
**
** FIELD OUTPUT: F-Output-1
**
*Output, field, variable=PRESELECT
**
** HISTORY OUTPUT: H-Output-1
**
*Output, history, variable=PRESELECT
*End Step
