*Heading
** Job name: exp_uaniso Model name: square_expander
** Generated by: Abaqus/CAE 2021
*Preprint, echo=NO, model=NO, history=NO, contact=NO
**
** PARTS
**
*Part, name=ES_face
*Node
      1,           1.,           9., 0.00999999978
      2,           1.,           1., 0.00999999978
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*Element, type=C3D8
  1,  68, 145,   9,   1, 509, 586, 450, 442
  2, 145, 146,  10,   9, 586, 587, 451, 450
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*Nset, nset=_PickedSet5, internal, generate
   1,  882,    1
*Elset, elset=_PickedSet5, internal, generate
   1,  400,    1
** Section: Sec-rigid
*Solid Section, elset=_PickedSet5, material=Rigid_mat
,
*End Part
**
*Part, name=ES_walls
*Node
      1,           9.,           1.,           0.
      2,           1.,           1.,           0.
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*Element, type=C3D8
  1, 190,  93,  92, 145, 406, 309, 308, 361
  2, 206, 105, 104, 205, 422, 321, 320, 421
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*Nset, nset=_PickedSet5, internal, generate
   1,  432,    1
*Elset, elset=_PickedSet5, internal, generate
   1,  144,    1
** Section: Sec-rigid
*Solid Section, elset=_PickedSet5, material=Rigid_mat
,
*End Part
**
*Part, name=SE_skin
*Node
      1,           9.,           9.,           0.
      2,           9.,           1.,           0.
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*Element, type=C3D8
   1,  132,  289,    9,    1, 1826, 1983, 1703, 1695
   2,  289,  290,   10,    9, 1983, 1984, 1704, 1703
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*Nset, nset=_PickedSet2, internal, generate
    1,  5082,     1
*Elset, elset=_PickedSet2, internal, generate
    1,  3226,     1
*Orientation, name=Ori-1
1., 0., 0., 0., 1., 0.
3, 30.
** Section: Sec-skin
*Solid Section, elset=_PickedSet2, orientation=Ori-1, material=uaniso
,
*End Part
**
**
** ASSEMBLY
**
*Assembly, name=Assembly
**
*Instance, name=SE_skin-1, part=SE_skin
*End Instance
**
*Instance, name=ES_walls-1, part=ES_walls
          0.,           0.,        -0.28
*End Instance
**
*Instance, name=ES_face-1, part=ES_face
          0.,           0.,        -0.29
*End Instance
**
*Node
      3,           5.,           5., -0.150000006
*Node
      4,           0.,           0.,           0.
*Node
      1,           0.,           0., -0.150000006
      2,           0.,           0., -0.100000001
*Nset, nset=Set-16, instance=ES_face-1, generate
 442,  882,    1
*Elset, elset=Set-16, instance=ES_face-1, generate
   1,  400,    1
*Nset, nset=_PICKEDSET47, internal
 2,
*Nset, nset=_PickedSet46, internal
 3,
*Nset, nset=_PickedSet49, internal
 4,
*Nset, nset=_PickedSet50, internal, instance=ES_walls-1, generate
   1,  432,    1
*Nset, nset=_PickedSet50, internal, instance=ES_face-1, generate
   1,  882,    1
*Elset, elset=_PickedSet50, internal, instance=ES_walls-1, generate
   1,  144,    1
*Elset, elset=_PickedSet50, internal, instance=ES_face-1, generate
   1,  400,    1
*Elset, elset=__PickedSurf52_S2, internal, instance=ES_walls-1, generate
   1,  144,    1
*Surface, type=ELEMENT, name=_PickedSurf52, internal
__PickedSurf52_S2, S2
*Elset, elset=__PickedSurf55_S1, internal, instance=SE_skin-1, generate
 1025,  1613,     1
*Surface, type=ELEMENT, name=_PickedSurf55, internal
__PickedSurf55_S1, S1
*Elset, elset=__PickedSurf59_S1, internal, instance=SE_skin-1, generate
    1,  1024,     1
*Elset, elset=__PickedSurf59_S1, internal, instance=ES_face-1, generate
   1,  256,    1
*Elset, elset=__PickedSurf59_S6, internal, instance=ES_walls-1
  11,  13,  16,  24,  25,  28
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*Elset, elset=__PickedSurf59_S4, internal, instance=ES_walls-1
  68, 114, 115, 116, 117, 120, 122, 124, 127, 129, 131, 138
*Elset, elset=__PickedSurf59_S3, internal, instance=ES_walls-1
  39,  42,  46,  51,  54,  58
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*Elset, elset=__PickedSurf59_S5, internal, instance=ES_walls-1
 112, 113, 133, 135, 136, 137, 139, 141, 142, 143
*Surface, type=ELEMENT, name=_PickedSurf59, internal
__PickedSurf59_S1, S1
__PickedSurf59_S6, S6
__PickedSurf59_S4, S4
__PickedSurf59_S3, S3
__PickedSurf59_S5, S5
*Elset, elset=__PickedSurf61_S1, internal, instance=ES_face-1, generate
 257,  400,    1
*Surface, type=ELEMENT, name=_PickedSurf61, internal
__PickedSurf61_S1, S1
*Elset, elset=__PickedSurf62_S1, internal, instance=ES_face-1, generate
 257,  400,    1
*Surface, type=ELEMENT, name=_PickedSurf62, internal
__PickedSurf62_S1, S1
** Constraint: RigidBody-1
*Rigid Body, ref node=_PickedSet49, elset=_PickedSet50
** Constraint: TIE_1-1
*Tie, name=TIE_1-1, adjust=yes
_PickedSurf52, _PickedSurf55
** Constraint: TIE_2-1
*Tie, name=TIE_2-1, adjust=yes
_PickedSurf61, _PickedSurf62
*End Assembly
**
** MATERIALS
**
*Material, name=Rigid_mat
*Density
1.,
*Elastic
 1e+12, 0.3
*Material, name=UMAT
*Density, dependencies=1
1., , 0.5
2., ,  1.
*Depvar
     10,
*User Defined Field
*User Material, constants=133
4.,         4.,        88.,        17.,         4.,         4.,         8.,         5.
    3.46706,   0.272751,    3.62834,   0.414207,     1.5396,   0.248578,     1.4402,   0.261306
 0.00114463, 0.00103455,  -0.444465,   0.171253,   0.228499,  -0.150749,  -0.753219,   0.281706
   0.337093,  -0.249066,  -0.228522,  0.0877231,  0.0471175, -0.0786181,  -0.524073,   0.185694
   0.171605,   -0.18318,   0.175829,   0.624264,    3.07785,   -2.62839,  -0.373635, 0.00694265
   -1.46439,   0.722236,   -1.50958,  -0.946797,   -2.62758,    1.78872,   0.802802,    1.12815
   0.997783,   -1.46512,  -0.729407,   0.148995,    -2.7685,      2.434,    1.48718,   0.831074
    1.46027,    -1.5557,   0.778689,    1.00332,    1.02118,   -2.11338,   -1.40309,  -0.877517
    -2.1003,    1.75766,   -4.97751,  -0.413529,  0.0411921,  -0.392783,  0.0552869,  -0.405598
   0.354975,   0.561375,   0.133141,   0.215683,  -0.800725,  -0.725944,   -1.15632,   -0.33372
  -0.775643,    7.47435,    0.22543,  -0.198313,  -0.139145,  -0.252945,  -0.344688,   0.825961
   0.171575,  0.0331572, -0.0497282,    4.22693, -0.0892569,   0.886637,   -0.20324,   0.634744
    4.37857,  -0.244694,    0.38325,   0.499579,   0.616637,   -1.04138,  0.0610112,   -1.00334
 -0.0731766,  -0.567845,    3.19697,   -0.42061,   -2.89216,    2.74492,  -0.504184,   0.650757
  -0.108808,   -1.26217,  -0.292305,   0.675771,   -1.18781,   0.686182,    1.46252,   0.603371
    1.25469,   0.634922,   0.865684,         1.,         1.,         2.,       0.01,         1.
         0.,         0.,         0.,         1.,         0.
*Material, name=test_iso_mat
*Elastic
1., 0.3
*Material, name=uaniso
*Anisotropic Hyperelastic, user, formulation=INVARIANT, type=INCOMPRESSIBLE, local direction=2, properties=3, moduli=INSTANTANEOUS
 0.1, 0.2, 0.3
**
** INTERACTION PROPERTIES
**
*Fluid Behavior, name=FLUID_PROP
*Fluid Density
1
*Fluid Bulk Modulus
 2.2e+06,
**
** BOUNDARY CONDITIONS
**
** Name: BC-4 Type: Symmetry/Antisymmetry/Encastre
*Boundary
Set-16, ENCASTRE
**
** INTERACTIONS
**
** Interaction: CAVITY
*Fluid Cavity, name=CAVITY, behavior=FLUID_PROP, refnode=_PickedSet46, surface=_PickedSurf59

** ----------------------------------------------------------------
**
** STEP: Step-1
**
*Step, name=Step-1, nlgeom=YES
*Static
1., 10., 0.0001, 1.
**
** BOUNDARY CONDITIONS
**
** Name: FluidCavPress-BC-1 Type: Fluid cavity pressure
*Boundary
_PickedSet46, 8, 8, 0.0001
**
** OUTPUT REQUESTS
**
*Restart, write, frequency=0
**
** FIELD OUTPUT: F-Output-1
**
*Output, field
*Node Output
CF, RF, U
*Element Output, directions=YES
E, EE, LE, PE, PEEQ, PEMAG, S
*Contact Output
CDISP, CSTRESS
**
** HISTORY OUTPUT: H-Output-1
**
*Output, history, variable=PRESELECT
*End Step
** ----------------------------------------------------------------
**
** STEP: Step-2
**
*Step, name=Step-2, nlgeom=YES
*Static
1., 10., 0.0001, 1.
**
** BOUNDARY CONDITIONS
**
** Name: BC-4 Type: Symmetry/Antisymmetry/Encastre
*Boundary, op=NEW
Set-16, ENCASTRE
** Name: FluidCavPress-BC-1 Type: Fluid cavity pressure
*Boundary, op=NEW
** Name: FluidCavPress-BC-2 Type: Fluid cavity pressure
*Boundary, op=NEW
_PickedSet46, 8, 8, 0.00015
**
** OUTPUT REQUESTS
**
*Restart, write, frequency=0
**
** FIELD OUTPUT: F-Output-2
**
*Output, field
*Node Output
CF, RF, U
*Element Output, directions=YES
E, EE, LE, PE, PEEQ, PEMAG, S
*Contact Output
CDISP, CSTRESS
**
** HISTORY OUTPUT: H-Output-2
**
*Output, history, variable=PRESELECT
*End Step
** ----------------------------------------------------------------
**
** STEP: Step-3
**
*Step, name=Step-3, nlgeom=YES
*Static
1., 10., 0.0001, 1.
**
** BOUNDARY CONDITIONS
**
** Name: BC-4 Type: Symmetry/Antisymmetry/Encastre
*Boundary, op=NEW
Set-16, ENCASTRE
** Name: FluidCavPress-BC-2 Type: Fluid cavity pressure
*Boundary, op=NEW
** Name: FluidCavPress-BC-3 Type: Fluid cavity pressure
*Boundary, op=NEW
_PickedSet46, 8, 8, 0.0002
**
** OUTPUT REQUESTS
**
*Restart, write, frequency=0
**
** FIELD OUTPUT: F-Output-3
**
*Output, field
*Node Output
CF, RF, U
*Element Output, directions=YES
E, EE, LE, PE, PEEQ, PEMAG, S
*Contact Output
CDISP, CSTRESS
**
** HISTORY OUTPUT: H-Output-3
**
*Output, history, variable=PRESELECT
*End Step
