*Heading
** Job name: uniaxial_2D_L_fine Model name: uniaxial_2D_L_fine
** Generated by: Abaqus/CAE 2020
*Preprint, echo=NO, model=NO, history=NO, contact=NO
**
** PARTS
**
*Part, name=Part-1
*Node
      1,           0.,           0.
      2,          0.5,           0.
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*Element, type=CPS4
    1,     1,     2,   103,   102
    2,     2,     3,   104,   103
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*Nset, nset=Set-1, generate
     1,  10201,      1
*Elset, elset=Set-1, generate
     1,  10000,      1
*Orientation, name=Ori-1
1., 0., 0., 0., 1., 0.
3, 0.
** Section: Section-1
*Solid Section, elset=Set-1, orientation=Ori-1, material=UANISOHYPER-MAT
,
*End Part
**
**
** ASSEMBLY
**
*Assembly, name=Assembly
**
*Instance, name=Part-1-1, part=Part-1
*End Instance
**
*Nset, nset=Set-1, instance=Part-1-1, generate
     1,  10101,    101
*Elset, elset=Set-1, instance=Part-1-1, generate
    1,  9901,   100
*Nset, nset=Set-2, instance=Part-1-1
 1,
*Nset, nset=Set-3, instance=Part-1-1, generate
   101,  10201,    101
*Elset, elset=Set-3, instance=Part-1-1, generate
   100,  10000,    100
*End Assembly
**
** MATERIALS
**
*Material, name=UANISOHYPER-MAT
*Anisotropic Hyperelastic, user, formulation=INVARIANT, type=INCOMPRESSIBLE, local direction=2, properties=375, moduli=INSTANTANEOUS
4.00000000000000000, 1.00000000000000000, 35.00000000000000000, 11.00000000000000000, 1.00000000000000000, 5.00000000000000000, 5.00000000000000000, 1.00000000000000000,
3.00000000000000000, 3.00000000000000000, 1.00000000000000000, 1.00000000000000000, -2.25683381499686364, 0.81247289264947564, -1.12011653079677131, 0.68859890159627024,
0.10294676183817823, -0.13846690371788639, -1.54852740093790153, -0.69008969524222141, -1.20517987368676338, 0.54969504454529039, 0.63740216663089544, 2.19840805684483476,
1.43325318461007267, 2.46050179940492741, -0.14157057010312335, 0.46949696233535948, -1.15717381429327992, 0.34946467499539013, -1.69142688800550856, -0.24555979378205156,
0.13663994098558266, 1.66094821258316361, 1.03207939010875216, 1.60478912948280339, -0.44064071605129040, -0.30107296602794575, 0.47934599972183362, -0.05171410189403460,
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0.50000000000000000, 0.50000000000000000, 7.56291859129381994, 0.39870796464345504, -10.14836491320033218, -12.97822402454301383, 1.00000000000000000,
**
** BOUNDARY CONDITIONS
**
** Name: BC-1 Type: Symmetry/Antisymmetry/Encastre
*Boundary
Set-1, XSYMM
** Name: BC-2 Type: Displacement/Rotation
*Boundary
Set-2, 1, 1
Set-2, 2, 2
Set-2, 6, 6
** ----------------------------------------------------------------
**
** STEP: Step-1
**
*Step, name=Step-1, nlgeom=YES
*Static
1., 1., 1e-05, 1.
**
** BOUNDARY CONDITIONS
**
** Name: BC-3 Type: Displacement/Rotation
*Boundary
Set-3, 1, 1, 10.
**
** OUTPUT REQUESTS
**
*Restart, write, frequency=0
**
** FIELD OUTPUT: F-Output-1
**
*Output, field, variable=PRESELECT
**
** HISTORY OUTPUT: H-Output-1
**
*Output, history, variable=PRESELECT
*End Step
